# OpenSim document version 40000
Model one_hinge_two_muscles_teaching:
  gravity: 0 -9.81 0
  Ground
  BodySet:
    Body lever: mass=1 [kg] mass_center=(0.15 0 0) inertia=(0.003 0.01 0.01 0 0 0)
  JointSet:
    PinJoint hinge: socket_parent_frame=ground_offset socket_child_frame=lever_offset
      Coordinate angle: default_value=0 range=(-1 1)
      PhysicalOffsetFrame ground_offset: socket_parent=/ground translation=(0 0 0) [meters]
      PhysicalOffsetFrame lever_offset: socket_parent=/bodyset/lever translation=(0 0 0)
  ForceSet:
    Millard2012EquilibriumMuscle flexor: min_control=0.01 max_control=1 max_isometric_force=100
        optimal_fiber_length=0.1 tendon_slack_length=0.04142136 pennation_angle_at_optimal=0 [radians]
      PathPoint origin: ground (0 0.1 0)
      PathPoint insertion: lever (0.1 0 0)
      ActiveForceLengthCurve: minimum_value=0
      ForceVelocityCurve: concentric_slope_at_vmax=0 concentric_slope_near_vmax=0.25 isometric_slope=5
          eccentric_slope_at_vmax=0 eccentric_slope_near_vmax=0.15 max_eccentric_velocity_force_multiplier=1.4
      FiberForceLengthCurve
      TendonForceLengthCurve
    Millard2012EquilibriumMuscle extensor: min_control=0.01 max_control=1 max_isometric_force=80
        optimal_fiber_length=0.1 tendon_slack_length=0.04142136 pennation_angle_at_optimal=0
      PathPoint origin: ground (0 -0.1 0)
      PathPoint insertion: lever (0.1 0 0)
      ActiveForceLengthCurve: minimum_value=0
      ForceVelocityCurve: concentric_slope_at_vmax=0 concentric_slope_near_vmax=0.25 isometric_slope=5
          eccentric_slope_at_vmax=0 eccentric_slope_near_vmax=0.15 max_eccentric_velocity_force_multiplier=1.4
      FiberForceLengthCurve
      TendonForceLengthCurve
    CoordinateActuator reserve: min_control=-20 max_control=20 coordinate=angle optimal_force=0.01
    PrescribedForce known_downward_force: socket_frame=/bodyset/lever pointIsGlobal=false forceIsGlobal=true
      FunctionSet forceFunctions: Constant(value=0) Constant(value=-2) Constant(value=0)
      FunctionSet pointFunctions: Constant(value=0.3) Constant(value=0) Constant(value=0)
